*Heading
** Job name: Stacked_B Model name: Stacked_B_Used
** Generated by: Abaqus/CAE 6.12-2
*Preprint, echo=NO, model=NO, history=NO, contact=NO
** ----------------------------------------------------------------
**
** PART INSTANCE: Beam_2d-Top
**
*Node
      1,       3.3125,        0.125
      2,       3.3125,       -0.125
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*Element, type=CPE4
  1,   1,  17, 423,  96
  2,  17,  18, 424, 423
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*Nset, nset=Beam_2d-Top__PickedSet28, generate
    1,  2171,     1
*Elset, elset=Beam_2d-Top__PickedSet28, generate
    1,  1992,     1
** Section: ShellSectionH
*Solid Section, elset=Beam_2d-Top__PickedSet28, material=STEEL
,
** ----------------------------------------------------------------
**
** PART INSTANCE: Beam_2d-Bottom
**
*System
 8.88178419700125e-16,       -0.25,          0.,          1.,       -0.25,          0.
*Node
   2172,       3.3125,        0.125
   2173,       3.3125,       -0.125
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*Element, type=CPE4
1993, 2172, 2188, 2594, 2267
1994, 2188, 2189, 2595, 2594
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*Nset, nset=Beam_2d-Bottom__PickedSet28, generate
 2172,  4342,     1
*Elset, elset=Beam_2d-Bottom__PickedSet28, generate
 1993,  3984,     1
** Section: ShellSectionH
*Solid Section, elset=Beam_2d-Bottom__PickedSet28, material=STEEL
,
*System
*Nset, nset=_PickedSet38
  15,  16, 376, 377, 378, 379, 380, 381, 382, 383, 384, 385, 386
*Nset, nset=_PickedSet38
2186,2187,2547,2548,2549,2550,2551,2552,2553,2554,2555,2556,2557
*Elset, elset=_PickedSet38, generate
 1981,  1992,     1
*Elset, elset=_PickedSet38, generate
 3973,  3984,     1
*Elset, elset=BotBeamElems, generate
 1993,  3984,     1
*Nset, nset=BotBeamNodes, generate
 2172,  4342,     1
*Elset, elset=TopBeamElems, generate
    1,  1992,     1
*Nset, nset=TopBeamNodes, generate
    1,  2171,     1
*Elset, elset=_s_TopSurf_S2
   12,   24,   36,   48,   60,   72
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*Elset, elset=_s_TopSurf_S4
  361,  373,  385,  397,  409,  421
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*Surface, type=ELEMENT, name=s_TopSurf
_s_TopSurf_S2, S2
_s_TopSurf_S4, S4
*Elset, elset=_TopPressureSurf_S4, generate
 589,  877,   12
*Surface, type=ELEMENT, name=TopPressureSurf
_TopPressureSurf_S4, S4
*Elset, elset=_m_BotSurf_S4
 1993, 2005, 2017, 2029, 2041, 2053
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*Elset, elset=_m_BotSurf_S2
 2364, 2376, 2388, 2400, 2412, 2424
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*Surface, type=ELEMENT, name=m_BotSurf
_m_BotSurf_S4, S4
_m_BotSurf_S2, S2
*Elset, elset=_BotPressureSurf_S2, generate
2592, 2880,   12
*Surface, type=ELEMENT, name=BotPressureSurf
_BotPressureSurf_S2, S2
**
** MATERIALS
**
*Material, name=STEEL
*Density
 0.000733952,
*Elastic
 2.9e+07, 0.285
**
** INTERACTION PROPERTIES
**
*Surface Interaction, name=FrictionContactProp
1.,
*Friction, lagrange
 0.6,
*Surface Behavior, pressure-overclosure=HARD
**
** BOUNDARY CONDITIONS
**
** Name: BC-1 Type: Symmetry/Antisymmetry/Encastre
*Boundary
_PickedSet38, ENCASTRE
**
** INTERACTIONS
**
** Interaction: ContactInt
*Contact Pair, interaction=FrictionContactProp, type=SURFACE TO SURFACE
s_TopSurf, m_BotSurf
** ----------------------------------------------------------------
**
** STEP: BoltPreLoad
**
*Step, name=BoltPreLoad, nlgeom=YES, inc=1000000
*Static, stabilize, factor=0.0002, allsdtol=0., continue=NO
0.5, 1., 1e-08, 1.
**
** LOADS
**
** Name: PressureLoadBot   Type: Pressure
*Dsload
BotPressureSurf, P, 2546.
** Name: PressureLoadTop   Type: Pressure
*Dsload
TopPressureSurf, P, 2546.
**
** OUTPUT REQUESTS
**
*Restart, write, frequency=0
**
** FIELD OUTPUT: F-Output-1
**
*Output, field, variable=PRESELECT
*Node Output
RF, U
*Element Output, directions=YES
S,
*Contact Output
CDISP, CDISPETOS, CFORCE, CNAREA, CSTATUS, CSTRESS
**
** HISTORY OUTPUT: H-Output-1
**
*Output, history
*Contact Output
CAREA, CFN1, CFN2, CFN3, CFNM, CFS1, CFS2, CFS3, CFSM
*End Step
